f(x) := x^2 - 7*x + 1
ε := 0.1
N := 16
a := 0
b := 8
j := 1 .. N/2
x[2*j - 1] := a + (b - a)/(N/2 + 1)*j - ε/2
x[2*j] := a + (b - a)/(N/2 + 1)*j + ε/2
x := submatrix(x, 1, N, 0, 0)
x = [0.838889; 0.938889; 1.72778; 1.82778; 2.61667; 2.71667; 3.50556; 3.60556; 4.39444; 4.49444; 5.28333; 5.38333; 6.17222; 6.27222; 7.06111; 7.16111]
f(x) = [-4.16849; -4.69071; -8.10923; -8.45367; -10.4697; -10.6364; -11.25; -11.2389; -10.45; -10.2611; -8.06972; -7.70306; -4.10923; -3.56478; 1.43151; 2.15373]
val := min(f(x))
val = -11.25
f(x) := x^2 - 7*x + 1
ε := 0.1
N := 17
a := 0
b := 8
j := 1 .. N
x[j] := a + (b - a)/(N + 1)*j
x := submatrix(x, 1, N, 0, 0)
x = [0.444444; 0.888889; 1.33333; 1.77778; 2.22222; 2.66667; 3.11111; 3.55556; 4; 4.44444; 4.88889; 5.33333; 5.77778; 6.22222; 6.66667; 7.11111; 7.55556]
f(x) = [-1.91358; -4.4321; -6.55556; -8.28395; -9.61728; -10.5556; -11.0988; -11.2469; -11; -10.358; -9.32099; -7.88889; -6.06173; -3.83951; -1.22222; 1.79012; 5.19753]
val := min(f(x))
val = -11.2469
