# 1.Распределение Вейбулла
# (функция плотности, функция распределения вероятностей).
f(t, b, c) := b/c*(t/c)^(b - 1)*e^(-(t/c)^b)
t := 0, 1 .. 30
# [plot: f(t, 3, 10), f(t, 5, 10), f(t, 5, 20) vs t]
F(t, b, c) := 1 - e^(-(t/c)^b)
# [plot: F(t, 3, 10), F(t, 5, 10), F(t, 5, 20) vs t]
M(b, c) := integral(t*f(t, b, c), t = 0 .. 100)
D(b, c) := integral(t^2*f(t, b, c), t = 0 .. 100) - M(b, c)^2
# 2. Функциональные зависимости и параметры, полученные с помощью имитации распределения Вейбулла методом обратных функций
n := 10000
i := 1 .. n
a := 0
b := 1
F(t, b, c) := 1 - e^(-(t/c)^b)
Y_1 := runif(n, a, b)
Y_1 = [
    0.290145; 0.838148; 0.723076; 0.971643; 0.129998; 0.115419; 0.452362; 0.52826; 0.0941259; 0.523162; 0.963109; 0.087584
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]
t := 1 - e^(-(y/c)^b)  # error: This variable is undefined. Check that the label is set correctly.
X_1(b, c) := c*(-ln(1 - Y_1))^(1/b)
F(X_1(3, 10), 3, 10) = [
    0.290145; 0.838148; 0.723076; 0.971643; 0.129998; 0.115419; 0.452362; 0.52826; 0.0941259; 0.523162; 0.963109; 0.087584
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]
X_1(3, 10) = [
    6.99792; 12.2117; 10.869; 15.2733; 5.18333; 4.96835; 8.44434; 9.09096; 4.6238; 9.04739; 14.8877; 4.50878
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]
e^(-(y/c)^b)
X_2(b, c) := sort(X_1(b, c))
1 - t
W_1 := X_1(3, 10)
W_2 := X_1(5, 10)
W_3 := X_1(5, 20)
y/c
(-1*ln(1 - t))^(1/b) =  # error: This variable is undefined. Check that the label is set correctly.
Z_1 := sort(W_1)
Z_2 := sort(W_2)
Z_3 := sort(W_3)
# [plot: Z_1[i], Z_2[i], Z_3[i] vs i]
bin := 10
lower(W) := floor(min(W))
upper(W) := ceil(max(W))
h(W) := (upper(W) - lower(W))/bin
j := 1 .. bin + 1
int_1[j] := lower(W_1) + h(W_1)*j
int_2[j] := lower(W_2) + h(W_2)*j
int_3[j] := lower(W_3) + h(W_3)*j
t_1 := hist(int_1, W_1)/n
t_2 := hist(int_2, W_2)/n
t_3 := hist(int_3, W_3)/n
int_1 := int_1 + h(W_1)/2
int_2 := int_2 + h(W_2)/2
int_3 := int_3 + h(W_3)/2
# [plot: t_1, t_2, t_3 vs int_1, int_2, int_3]
n := 9999
m(W_1) := sum(W_1[i], i = 1 .. n)/n
d(W) := sum(W[i]^2, i = 1 .. n)/n - (sum(W[i], i = 1 .. n)/n)^2
# 3.Сравнение результатов
M_1 := M(3, 10) = 8.9298
M_2 := M(5, 10) = 9.18169
M_3 := M(5, 20) = 18.3634
m_1 := m(W_1) = 8.91202
m_2 := m(W_2) = 9.17169
m_3 := m(W_3) = 18.3434
D_1 := D(3, 10) = 10.5333
D_2 := D(5, 10) = 4.423
D_3 := D(5, 20) = 17.692
d_1 := d(W_1) = 10.3149
d_2 := d(W_2) = 4.37831
d_3 := d(W_3) = 17.5132
