# Распределение Вейбулла
# 1. Исходные данные для статистического анализа
n := 10000
a := 0
b := 1
Y_1 := runif(n, a, b)
X_1(b, c) := c*(-ln(1 - Y_1))^(1/b)
X_2(b, c) := sort(X_1(b, c))
W_1 := X_1(3, 10)
W_2 := X_1(5, 10)
W_3 := X_1(5, 20)
Z_1 := sort(W_1)
Z_2 := sort(W_2)
Z_3 := sort(W_3)
N(t, Z) :=
    i ← 0
    while t > Z[i]
        i ← i + 1
    n - i
h := 0.5
Tmax(Z) := round(max(Z)/h, 0)
Tmax_1 := Tmax(Z_1)
Tmax_2 := Tmax(Z_2)
Tmax_3 := Tmax(Z_3)
i_1 := 0 .. Tmax_1
i_2 := 0 .. Tmax_2
i_3 := 0 .. Tmax_3
T_1[i_1] := i_1*h
T_2[i_2] := i_2*h
T_3[i_3] := i_3*h
i_1 := 0 .. Tmax_1 - 1
i_2 := 0 .. Tmax_2 - 1
i_3 := 0 .. Tmax_3 - 1
# 2.Функция надежности
Pl_2[i_2] := N(T_2[i_2], Z_2)/n
Pl_3[i_3] := N(T_3[i_3], Z_3)/n
Pl_1[i_1] := N(T_1[i_1], Z_1)/n
Pl_1[Tmax_1] := 0
Pl_2[Tmax_2] := 0
Pl_3[Tmax_3] := 0
F(t, b, c) := 1 - e^(-(t/c)^b)
P(t, b, c) := 1 - F(t, b, c)
# [plot: P(t, 3, 10), P(t, 5, 10), P(t, 5, 20) vs t]
# [plot: Pl_1, Pl_2, Pl_3 vs T_1, T_2, T_3]
# 3.Функция ненадежности
Ql_1[i_1] := (n - N(T_1[i_1], Z_1))/n
Ql_2[i_2] := (n - N(T_2[i_2], Z_2))/n
Ql_3[i_3] := (n - N(T_3[i_3], Z_3))/n
# [plot: F(t, 3, 10), F(t, 5, 10), F(t, 5, 20) vs t]
# [plot: Ql_1, Ql_2, Ql_3 vs T_1, T_2, T_3]
# 4.Функция частоты
i_1 := 0 .. Tmax_1 - 2
i_2 := 0 .. Tmax_2 - 2
i_3 := 0 .. Tmax_3 - 2
f(t, b, c) := b/c*(t/c)^(b - 1)*e^(-(t/c)^b)
fl_1[i_1] := (N(T_1[i_1], Z_1) - N(T_1[i_1] + h, Z_1))/(n*h)
fl_2[i_2] := (N(T_2[i_2], Z_2) - N(T_2[i_2] + h, Z_2))/(n*h)
fl_3[i_3] := (N(T_3[i_3], Z_3) - N(T_3[i_3] + h, Z_3))/(n*h)
# [plot: f(t, 3, 10), f(t, 5, 10), f(t, 5, 20) vs t]
# [plot: fl_1, fl_2, fl_3 vs T_1, T_2, T_3]
# 5.Функция интенсивности
λ(t, b, c) := f(t, b, c)/P(t, b, c)
λl_1[i_1] := (N(T_1[i_1], Z_1) - N(T_1[i_1] + h, Z_1))/(N(T_1[i_1], Z_1)*h)
λl_2[i_2] := (N(T_2[i_2], Z_2) - N(T_2[i_2] + h, Z_2))/(N(T_2[i_2], Z_2)*h)
λl_3[i_3] := (N(T_3[i_3], Z_3) - N(T_3[i_3] + h, Z_3))/(N(T_3[i_3], Z_3)*h)
# [plot: λ(t, 3, 10), λ(t, 5, 10), λ(t, 5, 20) vs t]
# [plot: λl_1, λl_2, λl_3 vs T_1, T_2, T_3]
