# Распределение Вейбулла
# 1. Плотность распределения
f(t, b, c) := b/c*(t/c)^(b - 1)*e^(-(t/c)^b)
t := 0, 1 .. 30
# [plot: f(t, 0.5, 10), f(t, 1, 10), f(t, 3, 10), f(t, 5, 10) vs t]
# [plot: f(t, 5, 10), f(t, 5, 20), f(t, 5, 30) vs t]
# 2. Функция распределения
F(t, b, c) := 1 - e^(-(t/c)^b)
# [plot: F(t, 0.5, 10), F(t, 1, 10), F(t, 3, 10), F(t, 5, 10) vs t]
# [plot: F(t, 5, 10), F(t, 5, 20), F(t, 5, 30) vs t]
# 3. Начальные моменты
a_1(b, c) := integral(t*f(t, b, c), t = 0 .. 100)
a_2(b, c) := integral(t^2*f(t, b, c), t = 0 .. 100)
a_3(b, c) := integral(t^3*f(t, b, c), t = 0 .. 100)
# 4. Математическое ожидание
d_1 := 0, 1 .. 30
M_1(b, c) := a_1(b, c)
M_1(5, 10) = 9.18169
m_t(b, c) := c*Γ(1 + 1/b)
m_t(5, 30) = 27.5451
# [plot: M_1(d_1, 10), m_t(d_1, 10) vs d_1]
# [plot: M_1(5, d_1), m_t(5, d_1) vs d_1]
# 5. Мода
Mo(t, b, c) := root(d/dt(f(t, b, c)), t, 1, 10)
Mo(0, 1, 10) =  # error: The function values for the end points of the interval must be of opposite signs.
# [plot: f(t, 1, 10), f(Mo(t, 1, 10), 1, 10) vs t, Mo(t, 1, 10)]
# 6. Медиана
Me(t, b, c) := root(F(t, 5, 30) - 1/2, t, 5, 30)
Me(0, 5, 30) = 27.8796
# 7. Дисперсия
D_1(b, c) := a_2(b, c) - a_1(b, c)^2
D_1(1, 10) = 99.546
D_1(5, 30) = 39.807
D_2(b, c) := c^2*(Γ(1 + 2/b) - Γ(1 + 1/b)^2)
D_2(1, 10) = 100
D_2(5, 30) = 39.807
# [plot: D_1(d_1, 10), D_2(d_1, 10) vs d_1]
# [plot: D_1(5, d_1), D_2(5, d_1) vs d_1]
# 8. Среднеквадратичное отклонение
σ(b, c) := sqrt(D_1(b, c))
σ(5, 30) = 6.30928
# 9. Коэффициент асиметрии
μ_3(b, c) := 2*a_1(b, c)^3 - 3*a_1(b, c)*a_2(b, c) + a_3(b, c)
S(b, c) := μ_3(b, c)/σ(b, c)
# [plot: S(d_1, 10), S(5, d_1), S(3, d_1) vs d_1]
S(5, 10) = -1.12393
S(5, 20) = -4.4957
S(5, 30) = -10.1153
